solve block
    # guess values
    v := [5, 2, 1; 4, 7, 3; 2, 2, 4]
    c := [12; 24; 9]
    lsolve(v, c) = [1.32143; 2.53571; 0.321429]
end solve block
solve block
    # guess values
    v2 := [1, -1, 3, 1; 4, 1, 5, 4; 2, -2, 1, 1; 1, -4, 5, 0]
    c2 := [5; 4; 6; 3]
    lsolve(v2, c2) = [-11.4286; -7; -2.71429; 17.5714]
end solve block
v := [5, 2, 1; 4, 7, 3; 2, 2, 4]
v2 := [1, -1, 3, 1; 4, 1, 5, 4; 2, -2, 1, 1; 1, -4, 5, 0]
|v| = 84
|v2| = 14
solve block
    # guess values
    v3 := [0, 0, 0, 0; 0, 0, 0, 0; 2, -2, 0, 1; 1, -4, 5, 0]
    c3 := [5; 4; 6; 3]
    lsolve(v3, c3) =  # error: Результаты вычисления не сходятся в решение. Дополнительные сведения см. в справке.
end solve block
solve block
    # guess values
    v4 := [1, 2, 3; 3, 5, 7; 1, 3, 4]
    c4 := [3; 0; 1]
    lsolve(v4, c4) = [-4; -13; 11]
end solve block
v4 := [1, 2, 3; 3, 5, 7; 1, 3, 4]
v3 := [0, 0, 0, 0; 0, 0, 0, 0; 2, -2, 0, 1; 1, -4, 5, 0]
|v3| = 0
|v4| = 1
